*HEADING
 NEGATIVE CORNERING 16 DEG
 restart from freeroll
************************************************************
*RESTART,READ,WRITE,END STEP
**********************************************************
************************************************************************
*Include, input=parameters.inc
************************************************************************
*STEP,NAME=Neg_2deg,NLGEOM=YES,UNSYMM=YES, CONVERT SDI=YES
 SLIP (2 degrees)
*STEADY STATE TRANSPORT,inertia=yes
 0.05, 1.0,,0.05
*************************
*MOTION,TYPE=VELOCITY, TRANSLATION
ROAD_REFERENCE_POINT,1, , <deg2_RP1>
ROAD_REFERENCE_POINT,2, , -<deg2_RP2>
*RESTART, WRITE, FREQUENCY=100
*OUTPUT, FIELD, freq=1
*ELEMENT OUTPUT
 SENER, LE, S
*NODE OUTPUT
 RF, CF, U
*CONTACT OUTPUT
 CDISP, CSTRESS, CFORCE, CNAREA
*OUTPUT, HISTORY,NUMBER INTERVAL=10
*CONTACT OUTPUT, SURFACE=TREAD_TOP_SURFACE
 CAREA
*NODE OUTPUT, NSET=LOWER_RIM_REFERENCE_POINT
 U, RF, V
*NODE OUTPUT, NSET=UPPER_RIM_REFERENCE_POINT
 U, RF, V
*NODE OUTPUT,NSET=ROAD_REFERENCE_POINT
 U, RF
*END STEP
********************************************************
*STEP,NAME=Neg_4deg,NLGEOM=YES,UNSYMM=YES, CONVERT SDI=YES
 SLIP (4 degrees)
*STEADY STATE TRANSPORT,inertia=yes
 0.05, 1.0,,0.05
*************************
*MOTION,TYPE=VELOCITY, TRANSLATION
ROAD_REFERENCE_POINT,1, , <deg4_RP1>
ROAD_REFERENCE_POINT,2, , -<deg4_RP2>
*END STEP
********************************************************
*STEP,NAME=Neg_6deg,NLGEOM=YES,UNSYMM=YES, CONVERT SDI=YES
 SLIP (6 degrees)
*STEADY STATE TRANSPORT,inertia=yes
 0.05, 1.0,,0.05
*************************
*MOTION,TYPE=VELOCITY, TRANSLATION
ROAD_REFERENCE_POINT,1, , <deg6_RP1>
ROAD_REFERENCE_POINT,2, , -<deg6_RP2>
*END STEP
********************************************************
*STEP,NAME=Neg_8deg,NLGEOM=YES,UNSYMM=YES, CONVERT SDI=YES
 SLIP (8 degrees)
*STEADY STATE TRANSPORT,inertia=yes
 0.05, 1.0,,0.05
*************************
*MOTION,TYPE=VELOCITY, TRANSLATION
ROAD_REFERENCE_POINT,1, , <deg8_RP1>
ROAD_REFERENCE_POINT,2, , -<deg8_RP2>
*END STEP
********************************************************
*STEP,NAME=Neg_10deg,NLGEOM=YES,UNSYMM=YES, CONVERT SDI=YES
 SLIP (10 degrees)
*STEADY STATE TRANSPORT,inertia=yes
 0.05, 1.0,,0.05
*************************
*MOTION,TYPE=VELOCITY, TRANSLATION
ROAD_REFERENCE_POINT,1, , <deg10_RP1>
ROAD_REFERENCE_POINT,2, , -<deg10_RP2>
*END STEP
**************************************
*STEP,NAME=Neg_12deg,NLGEOM=YES,UNSYMM=YES, CONVERT SDI=YES
 SLIP (12 degrees)
*STEADY STATE TRANSPORT,inertia=yes
 0.05, 1.0,,0.05
*************************
*MOTION,TYPE=VELOCITY, TRANSLATION
ROAD_REFERENCE_POINT,1, , <deg12_RP1>
ROAD_REFERENCE_POINT,2, , -<deg12_RP2>
*END STEP
********************************************************
*STEP,NAME=Neg_14deg,NLGEOM=YES,UNSYMM=YES, CONVERT SDI=YES
 SLIP (14 degrees)
*STEADY STATE TRANSPORT,inertia=yes
 0.05, 1.0,,0.05
*************************
*MOTION,TYPE=VELOCITY, TRANSLATION
ROAD_REFERENCE_POINT,1, , <deg14_RP1>
ROAD_REFERENCE_POINT,2, , -<deg14_RP2>
*END STEP
********************************************************
*STEP,NAME=Neg_16deg,NLGEOM=YES,UNSYMM=YES, CONVERT SDI=YES
 SLIP (16 degrees)
*STEADY STATE TRANSPORT,inertia=yes
 0.05, 1.0,,0.05
*************************
*MOTION,TYPE=VELOCITY, TRANSLATION
ROAD_REFERENCE_POINT,1, , <deg16_RP1>
ROAD_REFERENCE_POINT,2, , -<deg16_RP2>
*END STEP
********************************************************
